μ_in := 2
μ_out := 2.5
p_origin := 0.8
S := 5
p_1 := p_origin/S = 0.16
λ := μ_out/(μ_in/p_origin*S) = 0.2
r := (μ_in/μ_out)^2*(1 + sqrt(μ_out^-2)/μ_out^-1)^2/(2*(1 - μ_in/μ_out)) = 6.4
r := (p_1/λ)^2*(1 + sqrt(λ^-2)/λ^-1)^2/(2*(1 - p_1/λ)) = 6.4
sum((1 - p_1)^i*(1 - e^(-λ*i)) - p_1*e^(-λ*i), i = 0 .. ∞) → 2.16493887072
sum(p_1*e^(-λ*i), i = 0 .. ∞) → 0.88266489058
sum((1 - p_1)^i*(1 - e^(-λ*i)), i = 0 .. ∞) → 3.0476037613
sum((1 - p_1)*e^(-λ*x), x = 0 .. ∞) → 4.63399067555
sum(p_1*e^(-λ*i) - sum((1 - p_1)*(1 - e^(-λ*(j - 1))), j = 1 .. i), i = 0 .. 3) → -0.0954055065258
limit((1 - p_1)*(1 - e^(-λ*x))/(p_1*e^(-λ*x)), x → ∞) → ∞
